// COMSOL Multiphysics 5.5.0.292 model "simulation_final_github.mph"
// Outline of the model tree

Parameters
  radius = 147.5 [nm]
  domain = 3.5 [um]
  periodicity = 400 [nm]
  L_min = 300 [nm]
  L_max = 900 [nm]
  angle = -60 [deg]  // Based on experimental analysis
  rotation = 0[deg]

Geometry
  geom1 "Geometry 1" (2D, length unit nm)
    c1: Circle | r = radius
    c2: Circle | pos = {periodicity*sin(0), periodicity*cos(0)}; r = radius
    c3: Circle | pos = {periodicity*sin(pi/3), periodicity*cos(pi/3)}; r = radius
    c4: Circle | pos = {periodicity*sin(2*pi/3), periodicity*cos(2*pi/3)}; r = radius
    c5: Circle | pos = {periodicity*sin(3*pi/3), periodicity*cos(3*pi/3)}; r = radius
    c6: Circle | pos = {periodicity*sin(4*pi/3), periodicity*cos(4*pi/3)}; r = radius
    rot5: Rotate "Rotate the unit cell" | input = c1, c2, c3, c4, c5, c6; rot = 30
    arr4: Array "Array 1 first row"
      input = rot5(6)
      size = {6, 4}
      linearsize = 3
      fullsize = {6, 4}
      displ = {periodicity, 692.82}
    arr6: Array "Array 2 second row"
      input = rot5(1)
      size = {5, 3}
      linearsize = 3
      fullsize = {5, 3}
      displ = {periodicity, 692.82}
    r5: Rectangle "medium" | pos = {periodicity*2, 692.82}; base = center; size = {domain, domain}
    r3: Rectangle "PML right" (disabled)
      pos = {periodicity*2+domain/2+150/2+500/2, 692.82}
      base = center
      size = {150, domain}
    r8: Rectangle "PML left" (disabled)
      pos = {periodicity*2-domain/2-150/2-500/2, 692.82}
      base = center
      size = {150, domain}
    rot6: Rotate "Rotate domain"
      input = arr4, arr6, rot5(2), rot5(3), rot5(4), rot5(5)
      rot = rotation
      pos = {periodicity*2, 618.34}
    mov1: Move (disabled) | input = , , r3, r5, r8, , , , ; displx = 1000; disply = 1000
    sca1: Scale (disabled) | input = , , ; isotropic = 0.75; factor = 0.75; pos = {periodicity*2, 618.34}
    fin: Finalize "Form Union"

Materials
  mat1: Common "agar" on domains 1
    RefractiveIndex
      n = 1.34
      ki = 0
  mat2: Common "cells" on domains 2-40
    RefractiveIndex
      n = 1.38
      ki = 0
  mat3: Common "Air (Ciddor 1996: n 0.23-1.690 µm)" (disabled) on no domains
    RefractiveIndex
      n = n_interp(c_const/freq)
      ki = k_interp(c_const/freq)
      int1: Interpolation "Refractive index"
        funcname = n_interp
        table = 
          {2.3E-7, 1.00030800296}
          {2.446E-7, 1.00030303618}
          {2.592E-7, 1.00029911018}
          {2.738E-7, 1.00029593773}
          {2.884e-07, 1.00029332864}
          {3.03E-7, 1.00029115153}
          {3.176E-7, 1.00028931258}
          {3.322e-07, 1.00028774294}
          {3.468e-07, 1.00028639095}
          {3.614e-07, 1.00028521709}
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        interp = piecewisecubic
        argunit = m
        fununit = 1
      int2: Interpolation "Refractive index, imaginary part" | funcname = k_interp; table = {{2.3E-7, 0.0}, {9.6E-7, 0.0}, {1.69E-6, 0.0}}; interp = piecewisecubic; argunit = m; fununit = 1
  mat4: Common "(C6H10O5)n (Cellulose) (Sultanova et al. 2009: n 0.4368-1.052 µm)" (disabled) on domains 1
    RefractiveIndex
      n = n_interp(c_const/freq)
      ki = k_interp(c_const/freq)
      int1: Interpolation "Refractive index"
        funcname = n_interp
        table = 
          {4.368E-7, 1.4809945784}
          {4.42952E-7, 1.48030994797}
          {4.49104e-07, 1.47965514545}
          {4.55256e-07, 1.47902843797}
          {4.61408E-7, 1.47842821834}
          {4.6756E-7, 1.47785299419}
          {4.73712e-07, 1.47730137808}
          {4.79864E-7, 1.47677207873}
          {4.86016E-7, 1.476263893}
          {4.92168E-7, 1.47577569871}
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        interp = piecewisecubic
        argunit = m
        fununit = 1
      int2: Interpolation "Refractive index, imaginary part" | funcname = k_interp; table = {{4.368E-7, 0.0}, {7.444e-07, 0.0}, {1.052E-6, 0.0}}; interp = piecewisecubic; argunit = m; fununit = 1

Physics
  ewfd: ElectromagneticWavesFrequencyDomain on all domains
    dependent variable E = {Ex, Ey, Ez}
    MeshControl.SizeControlParameter = Wavelength
    MeshControl.PhysicsControlledMeshMinimumWavelength = 300 [nm]
    MeshControl.ResolveWaveInLossyMedia = 0
    components.components = threecomponent
    BackgroundField.SolveFor = fullField
    wee1: WaveEquationElectric (default)
    pec1: PerfectElectricConductor (default)
    init1: init "Initial Values 1" (default)
    port1: Port on boundaries 3
      PortExcitation = on
      Pin = 1[W]
      PortSlit = 0
      PortType = Periodic
      Eampl = {0, 0, 1}
      alpha_inc = angle
    port2: Port on boundaries 2 | PortSlit = 0; PortType = Periodic; Eampl = {0, 0, 1}
    pc1: PeriodicCondition on boundaries 1, 4
      PeriodicType = Floquet
      Floquet_source = FromPeriodicPort
      destinationDomains: boundaries 4

Mesh
  mesh1 "Mesh 1" (physics-controlled)
    size: MeshSizeDefault | hauto = 4

Studies
  std1 "Study 1"
    param: Parametric "Parametric Sweep (rotation)"
      sweeptype = filled
      pname = rotation
      plistarr = range(-30 [deg],5 [deg],30 [deg])
      punit = deg
      keepsol = all
    wave: Wavelength "Wavelength Domain" | punit = nm; plist = range(L_min,5 [nm],L_max)